# OpenSim document version 30000
ScaleTool -scaled:
  mass: 2 [kg]
  height: -1
  age: -1
  ModelScaler:
    apply: true
    scaling_order: manualScale
    time_range: -1 -1
    preserve_mass_distribution: false
    ScaleSet:
      Scale: scales=(2 2 2) segment=block apply=true
      Scale: scales=(2 2 2) segment=block1 apply=true
  MarkerPlacer:
    apply: false
    time_range: -1 -1
    max_marker_movement: -1
