# OpenSim document version 30000
Model:
  length_units: meters
  force_units: N
  gravity: 0 -9.80665 0
  credits:
    Frank Anderson, Peter Loan, Ayman Habib, Ajay Seth, Michael Sherman
  BodySet:
    Body ground: mass=0 mass_center=(0 0 0) inertia_xx=1 inertia_yy=1 inertia_zz=1
    Body block: mass=1 mass_center=(0 0 0) inertia_xx=1 inertia_yy=1 inertia_zz=1 meshes=block.vtp
      FreeJoint grd_block: parent_body=ground location_in_parent=(0 0 0) location=(0 0.07 0)
        Coordinate grd_block_xRotation: motion_type=rotational
        Coordinate grd_block_yRotation: motion_type=rotational
        Coordinate grd_block_zRotation: motion_type=rotational
        Coordinate grd_block_xTranslation: motion_type=translational
        Coordinate grd_block_yTranslation: motion_type=translational
        Coordinate grd_block_zTranslation: motion_type=translational
    Body block1: mass=1 mass_center=(0 0 0) inertia_xx=1 inertia_yy=1 inertia_zz=1 meshes=block.vtp
      PinJoint jnt1: parent_body=block location_in_parent=(0 -0.07 0) location=(0 0.07 0)
        Coordinate jnt1_coord_0: motion_type=rotational
  ForceSet:
    Ligament lateralLigament: resting_length=0.14 pcsa_force=1000
      PathPoint P1: block (0 0 0.05)
      PathPoint P2: block1 (0 0 0.05)
      force_length_curve: SimmSpline: x=(-1 -0.5 -0.2 0 0.01 0.02 0.03 0.04 0.05 0.06 0.07 0.1 0.13 0.15 0.2 0.4 0.7 1)
          y=(0 0 0 0 0.00083333 0.00333333 0.0075 0.0133333 0.0208333 0.03 0.04 0.07 0.1 0.12 0.17 0.37 0.67 0.97)
    Ligament MedialLigament: resting_length=0.14 pcsa_force=1000
      PathPoint P1: block (0 0 -0.05)
      PathPoint P2: block1 (0 0 -0.05)
      force_length_curve: SimmSpline: x=(-1 -0.5 -0.2 0 0.01 0.02 0.03 0.04 0.05 0.06 0.07 0.1 0.13 0.15 0.2 0.4 0.7 1)
          y=(0 0 0 0 0.00083333 0.00333333 0.0075 0.0133333 0.0208333 0.03 0.04 0.07 0.1 0.12 0.17 0.37 0.67 0.97)
    Ligament internalLigament: resting_length=0.04 pcsa_force=1000
      PathPoint P1: block (0 -0.05 0)
      PathPoint P2: block1 (0 0.05 0)
      force_length_curve: SimmSpline: x=(-1 -0.5 -0.2 0 0.01 0.02 0.03 0.04 0.05 0.06 0.07 0.1 0.13 0.15 0.2 0.4 0.7 1)
          y=(0 0 0 0 0.00083333 0.00333333 0.0075 0.0133333 0.0208333 0.03 0.04 0.07 0.1 0.12 0.17 0.37 0.67 0.97)
    Ligament crossLigament: resting_length=0.147 pcsa_force=1000
      PathPoint P1: block (0.05 -0.05 0.05)
      PathPoint P2: block1 (-0.05 0.05 -0.05)
      force_length_curve: SimmSpline: x=(-1 -0.5 -0.2 0 0.01 0.02 0.03 0.04 0.05 0.06 0.07 0.1 0.13 0.15 0.2 0.4 0.7 1)
          y=(0 0 0 0 0.00083333 0.00333333 0.0075 0.0133333 0.0208333 0.03 0.04 0.07 0.1 0.12 0.17 0.37 0.67 0.97)
